$PROB UseCase
;Model based on:
; Holford NHG. The visual predictive check – superiority to standard diagnostic (Rorschach) plots [www.page-meeting.org/?abstract=738]. PAGE. 2005;14
;Data obtained from:
; O'Reilly RA, Aggeler PM, Leong LS. Studies of the coumarin anticoagulant drugs: The pharmacodynamics of warfarin in man. Journal of Clinical Investigation 1963;42(10):1542-1551
; O'Reilly RA, Aggeler PM. Studies on coumarin anticoagulant drugs Initiation of warfarin therapy without a loading dose. Circulation 1968;38:169-177

$INPUT ID TIME WT AMT DVID DV MDV LOGTWT
$DATA ../data/warfarin_conc.csv IGNORE=#

;$EST METHOD=SAEM AUTO=1
$EST METHOD=COND INTER
NSIG=3 SIGL=9
MAXEVAL=9990
$COV

$THETA
(0.001,0.1,) ; POP_CL units="L/h/70kg"
(0.001,8,)   ; POP_V units="L/70kg"
(0.001,0.362,) ; POP_KA units="1/h"
(0.001,1,) ; POP_TLAG units="h"
0.75 FIX ; POP_BETA_CL_WT
1 FIX ; POP_BETA_V_WT

$OMEGA BLOCK(2) SD CORRELATION
0.1 ; PPV_CL
.01 0.1 ; PPV_V
$OMEGA
0.1 SD ; PPV_KA
0 FIX SD ; PPV_TLAG

$SIGMA
0.01 ; RUV_PROP
0.01 ; RUV_ADD units "mg/L"

$SUBR ADVAN13 TOL=9
$MODEL
COMP (GUT)
COMP (CENTRAL)
$PK

   GRP_CL=POP_CL*(WT/70)**POP_BETA_CL_WT
   GRP_V=POP_V*WT/70**POP_BETA_V_WT
   GRP_KA=POP_KA
   GRP_TLAG=POP_TLAG

   CL=GRP_CL*EXP(PPV_CL)
   V=GRP_V*EXP(PPV_V)
   KA=GRP_KA*EXP(PPV_KA)
   TLAG=GRP_TLAG*EXP(PPV_TLAG)

   ALAG1=TLAG
   F1=1
   S2=V

$DES
   if (T>=TLAG) THEN
      ratein=A(1)*KA
   else
      ratein=0
   endif
   DADT(1)=-ratein
   DADT(2)=ratein - CL*A(2)/V

$ERROR
   CC=A(2)/V

   Y=CC*(1+RUV_PROP) + RUV_ADD

$TABLE ID TIME WT LOGTWT ; covariates
CL V KA TLAG ; EBE estimates
DVID MDV Y ; predictions
ONEHEADER NOAPPEND NOPRINT FILE=warf.fit
