;generated by MDL2NMTRAN v.5.1.4


$SIZES LVR=70 LNP4=9000 ; LNP4=4000 default
$PROB TWO COMPARTMENT ZERO ORDER INFUSION

$INPUT
ID MONTH TRIAL OCC WTKG PREV TIME AMT RATE SS II CMT DV MDV

$DATA 522_sim_2014.csv

$THETA
(0.02, 11.4, 100) ; POP_V1
(0.02, 30.9, 500) ; POP_CL
(0.02, 27.3, 100) ; POP_V2
(0.02, 34.6, 100) ; POP_Q
2 FIX ; POP_TTK0
(0, 3.42, 10) ; POP_RSYN
(0, 0.075, 1) ; POP_CSSOP

$OMEGA BLOCK (4)
0.015 ; BSVV1
0.00377 0.0158 ; BSVCL
0.0156 0.0127 0.0218 ; BSVV2
0.0273 0.0282 0.0411 0.0804 ; BSVQ

$OMEGA BLOCK (4)
0.0254 ; BOVV11
0.0152 0.016 ; BOVCL1
0.011 0.0102 0.00667 ; BOVV21
0.0275 0.0137 0.0105 0.0313 ; BOVQ1

$OMEGA BLOCK (4) SAME
; BOVV12
; BOVCL2
; BOVV22
; BOVQ2

$OMEGA BLOCK (4) SAME
; BOVV13
; BOVCL3
; BOVV23
; BOVQ3

$OMEGA BLOCK (4) SAME
; BOVV14
; BOVCL4
; BOVV24
; BOVQ4

$OMEGA BLOCK (4) SAME
; BOVV15
; BOVCL5
; BOVV25
; BOVQ5

$OMEGA BLOCK (4) SAME
; BOVV16
; BOVCL6
; BOVV26
; BOVQ6

$OMEGA BLOCK (4) SAME
; BOVV17
; BOVCL7
; BOVV27
; BOVQ7

$OMEGA BLOCK (4) SAME
; BOVV18
; BOVCL8
; BOVV28
; BOVQ8

$OMEGA BLOCK (4) SAME
; BOVV19
; BOVCL9
; BOVV29
; BOVQ9

$OMEGA BLOCK (4) SAME
; BOVV110
; BOVCL10
; BOVV210
; BOVQ10

$OMEGA
0 FIX ; PPV_CVTTK0
0.513 ; PPV_CVRSYN
1.53 ; PPV_CVCSSOP

$OMEGA BLOCK (4)
0.156 ; PPV_BTVV11
0.0407 0.0292 ; PPV_BTVCL1
0.018 0.0273 0.043 ; PPV_BTVV21
-0.059 0.0203 0.0545 0.115 ; PPV_BTVQ1

$OMEGA BLOCK (4) SAME
; PPV_BTVV12
; PPV_BTVCL2
; PPV_BTVV22
; PPV_BTVQ2

$OMEGA BLOCK (4) SAME
; PPV_BTVV13
; PPV_BTVCL3
; PPV_BTVV23
; PPV_BTVQ3

$OMEGA BLOCK (4) SAME
; PPV_BTVV14
; PPV_BTVCL4
; PPV_BTVV24
; PPV_BTVQ4

$OMEGA BLOCK (4) SAME
; PPV_BTVV15
; PPV_BTVCL5
; PPV_BTVV25
; PPV_BTVQ5

$SIGMA
0.0118 ; RUV_CVCP
0.0249 ; RUV_SDCP
$SUBR ADVAN3 TRANS4


$PK
FWV = WTKG/70
FWCL = FWV**0.75
TVV1 = THETA(1)*FWV
TVCL = THETA(2)*FWCL
TVV2 = THETA(3)*FWV
TVQ = THETA(4)*FWCL
TVTTK0 = THETA(5)
IF (OCC.EQ.1) THEN
	BOVV1 = ETA(5)
	BOVCL = ETA(6)
	BOVV2 = ETA(7)
	BOVQ = ETA(8)
ENDIF
IF (OCC.EQ.2) THEN
	BOVV1 = ETA(9)
	BOVCL = ETA(10)
	BOVV2 = ETA(11)
	BOVQ = ETA(12)
ENDIF
IF (OCC.EQ.3) THEN
	BOVV1 = ETA(13)
	BOVCL = ETA(14)
	BOVV2 = ETA(15)
	BOVQ = ETA(16)
ENDIF
IF (OCC.EQ.4) THEN
	BOVV1 = ETA(17)
	BOVCL = ETA(18)
	BOVV2 = ETA(19)
	BOVQ = ETA(20)
ENDIF
IF (OCC.EQ.5) THEN
	BOVV1 = ETA(21)
	BOVCL = ETA(22)
	BOVV2 = ETA(23)
	BOVQ = ETA(24)
ENDIF
IF (OCC.EQ.6) THEN
	BOVV1 = ETA(25)
	BOVCL = ETA(26)
	BOVV2 = ETA(27)
	BOVQ = ETA(28)
ENDIF
IF (OCC.EQ.7) THEN
	BOVV1 = ETA(29)
	BOVCL = ETA(30)
	BOVV2 = ETA(31)
	BOVQ = ETA(32)
ENDIF
IF (OCC.EQ.8) THEN
	BOVV1 = ETA(33)
	BOVCL = ETA(34)
	BOVV2 = ETA(35)
	BOVQ = ETA(36)
ENDIF
IF (OCC.EQ.9) THEN
	BOVV1 = ETA(37)
	BOVCL = ETA(38)
	BOVV2 = ETA(39)
	BOVQ = ETA(40)
ENDIF
IF (OCC.EQ.10) THEN
	BOVV1 = ETA(41)
	BOVCL = ETA(42)
	BOVV2 = ETA(43)
	BOVQ = ETA(44)
ENDIF
IF (TRIAL.EQ.1) THEN
	BTVV1 = ETA(48)
	BTVCL = ETA(49)
	BTVV2 = ETA(50)
	BTVQ = ETA(51)
ENDIF
IF (TRIAL.EQ.2) THEN
	BTVV1 = ETA(52)
	BTVCL = ETA(53)
	BTVV2 = ETA(54)
	BTVQ = ETA(55)
ENDIF
IF (TRIAL.EQ.3) THEN
	BTVV1 = ETA(56)
	BTVCL = ETA(57)
	BTVV2 = ETA(58)
	BTVQ = ETA(59)
ENDIF
IF (TRIAL.EQ.4) THEN
	BTVV1 = ETA(60)
	BTVCL = ETA(61)
	BTVV2 = ETA(62)
	BTVQ = ETA(63)
ENDIF
IF (TRIAL.EQ.5) THEN
	BTVV1 = ETA(64)
	BTVCL = ETA(65)
	BTVV2 = ETA(66)
	BTVQ = ETA(67)
ENDIF
PPV1 = ETA(1)+BOVV1+BTVV1
PPCL = ETA(2)+BOVCL+BTVCL
PPV2 = ETA(3)+BOVV2+BTVV2
PPQ = ETA(4)+BOVQ+BTVQ
V1 = TVV1*EXP(PPV1)
CL = TVCL*EXP(PPCL)
V2 = TVV2*EXP(PPV2)
Q = TVQ*EXP(PPQ)
TTK0 = TVTTK0*EXP(ETA(45))
TVRSYN = THETA(6)
TVCSS = THETA(7)
RSYN = TVRSYN*EXP(ETA(46))
CSS = TVCSS*EXP(ETA(47))
D1 = TTK0
R1 = CL*CSS
S1 = V1
S2 = V2

$ERROR
CSYN = RSYN/CL
C = F+CSYN
Y = C*(1+EPS(1))+EPS(2)

$TABLE
ID MONTH TRIAL OCC WTKG PREV TIME AMT RATE SS II CMT Y MDV
ONEHEADER NOPRINT FILE=levodopa_variability_task.fit


$ESTIM METHOD=CONDITIONAL INTERACTION
MAXEVAL=0 NSIG=3 SIGL=9 NOABORT PRINT=1
;$SIM (20130510) ONLYSIM NSUB=1
; Population PK parameters
