; Script generated by the pharmML2Nmtran Converter v.0.4.0
; Source 	: PharmML 0.8.1
; Target 	: NMTRAN 7.3.0
; Model 	: Executable_DelBene_2009_oncology_in_vitro
; Model Name: Generated from MDL. MOG ID: delbene2009
; Dated 	: Tue Sep 20 00:13:50 CEST 2016

$PROBLEM Generated from MDL. MOG ID: delbene2009

$INPUT  ID TIME DV CONC MDV
$DATA "Simulated_delbene2009_data.csv" IGNORE=@
$SUBS ADVAN13 TOL=9

$MODEL
COMP (COMP1) 	;NP
COMP (COMP2) 	;N1
COMP (COMP3) 	;N2
COMP (COMP4) 	;N3


$PK
CV = THETA(1)
POP_LAMBDA0 = THETA(2)
POP_K1 = THETA(3)
POP_K2 = THETA(4)
POP_N0 = THETA(5)


LAMBDA0 = POP_LAMBDA0

K1 = POP_K1

K2 = POP_K2

N0 = POP_N0

A_0(1) = N0
A_0(2) = 0
A_0(3) = 0
A_0(4) = 0

$DES
NP_DES = A(1)
N1_DES = A(2)
N2_DES = A(3)
N3_DES = A(4)
NT_DES = (((NP_DES+N1_DES)+N2_DES)+N3_DES)
DADT(1) = ((LAMBDA0*NP_DES)-((K2*CONC)*NP_DES))
DADT(2) = (((K2*CONC)*NP_DES)-(K1*N1_DES))
DADT(3) = ((K1*N1_DES)-(K1*N2_DES))
DADT(4) = ((K1*N2_DES)-(K1*N3_DES))

$ERROR
EPS_RES_W = EPS(1)

NP = A(1)
N1 = A(2)
N2 = A(3)
N3 = A(4)
NT = (((NP+N1)+N2)+N3)
IPRED = NT
W = CV*IPRED
Y = IPRED+W*EPS_RES_W
IRES = DV - IPRED
IWRES = IRES/W

$THETA
( 0.0 , 0.1 )	;CV
( 0.0 , 0.1 )	;POP_LAMBDA0
( 0.0 , 0.1 )	;POP_K1
( 0.0 , 0.1 )	;POP_K2
( 0.0 , 1000.0 )	;POP_N0

$OMEGA 0 FIX

$SIGMA
1.0 FIX


$EST METHOD=COND NSIG=3 SIGL=9 MAXEVALS=9999 PRINT=10 NOABORT

$TABLE  ID TIME CONC MDV PRED RES WRES DV IPRED IRES IWRES Y NOAPPEND NOPRINT FILE=sdtab

$TABLE  ID LAMBDA0 K1 K2 N0 NOAPPEND NOPRINT FILE=patab

$TABLE  ID CONC NOAPPEND NOPRINT FILE=cotab
