; Script generated by the pharmML2Nmtran Converter v.0.4.0
; Source 	: PharmML 0.8.1
; Target 	: NMTRAN 7.3.0
; Model 	: Executable_Friedrich_2014_PK
; Model Name: Generated from MDL. MOG ID: friedrich_pk_mog
; Dated 	: Thu Sep 08 11:08:01 CEST 2016

$PROBLEM Generated from MDL. MOG ID: friedrich_pk_mog

$INPUT  ID TIME DV MDV CMT AMT DDI CGCL TALD
$DATA "Simulated_data_PK_reduced.csv" IGNORE=@
$SUBS ADVAN13 TOL=9

$MODEL
COMP (COMP1) 	;A1
COMP (COMP2) 	;A2
COMP (COMP3) 	;A3


$PK
POP_V2 = THETA(1)
POP_Q = THETA(2)
POP_CL = THETA(3)
V3 = THETA(4)
BETA_DOSE_CL = THETA(5)
BETA_CGCL_CL = THETA(6)
KA = THETA(7)
RUV_PROP = THETA(8)

ETA_CL = ETA(1)
ETA_V2 = ETA(2)
ETA_Q = ETA(3)

GRPCL = ((POP_CL*(1+(BETA_DOSE_CL*DDI)))*(1+(BETA_CGCL_CL*(CGCL-91.28))))

MU_1 = LOG(GRPCL)
CL =  EXP(MU_1 + ETA(1)) ;

MU_2 = LOG(POP_V2)
V2 =  EXP(MU_2 + ETA(2)) ;

MU_3 = LOG(POP_Q)
Q =  EXP(MU_3 + ETA(3)) ;

K23 = (Q/V2)

K32 = (Q/V3)

NM_S2 = (V2/1000)

NM_S3 = (V3/1000)

A_0(1) = 0
A_0(2) = 0
A_0(3) = 0

$DES
A1_DES = A(1)
A2_DES = A(2)
A3_DES = A(3)
C2_DES = (A2_DES/NM_S2)
C3_DES = (A3_DES/NM_S3)
DADT(1) = -((A1_DES*KA))
DADT(2) = ((((KA*A1_DES)-(K23*A2_DES))+(K32*A3_DES))-((CL/V2)*A2_DES))
DADT(3) = ((K23*A2_DES)-(K32*A3_DES))

$ERROR
EPS_Y = EPS(1)

A1 = A(1)
A2 = A(2)
A3 = A(3)
C2 = (A2/NM_S2)
C3 = (A3/NM_S3)
IPRED = C2
W = RUV_PROP*IPRED
Y = IPRED+W*EPS_Y
IRES = DV - IPRED
IWRES = IRES/W

$THETA
( 0.0 , 250.0 , 1000.0 )	;POP_V2
( 0.0 , 10.0 , 100.0 )	;POP_Q
( 0.0 , 20.0 , 50.0 )	;POP_CL
( 0.0 , 1000.0 , 10000.0 )	;V3
( 0.0 , 0.001 , 0.005 )	;BETA_DOSE_CL
( 0.0 , 0.001 , 0.005 )	;BETA_CGCL_CL
(0.3  FIX )	;KA
(1.0  FIX )	;RUV_PROP

$OMEGA BLOCK(2)
(0.5 )	;PPV_CL
(0.3 )	;COV_CL_V2
(0.5 )	;PPV_V2

$OMEGA
(1.0 )	;PPV_Q

$SIGMA
0.5	;SIGMA_RES_Y


$EST METHOD=COND NSIG=3 SIGL=9 MAXEVALS=9999 PRINT=10 NOABORT

$TABLE  ID TIME MDV CMT AMT DDI CGCL TALD PRED RES WRES DV IPRED IRES IWRES Y NOAPPEND NOPRINT FILE=sdtab

$TABLE  ID CL V2 Q K23 K32 NM_S2 NM_S3 ETA_CL ETA_V2 ETA_Q NOAPPEND NOPRINT FILE=patab

$TABLE  ID DDI CGCL TALD NOAPPEND NOPRINT FILE=cotab
