; Script generated by the pharmML2Nmtran Converter v.0.4.0
; Source 	: PharmML 0.8.1
; Target 	: NMTRAN 7.3.0
; Model 	: Executable_Hansson_2013_blood_pressure_sunitinib_NOSTRUCTURED
; Model Name: Generated from MDL. MOG ID: hansson_bp_mog
; Dated 	: Sat Sep 03 19:35:50 CEST 2016

$PROBLEM Generated from MDL. MOG ID: hansson_bp_mog

$INPUT  ID CYCL=DROP TIME TIMED=DROP DOS DV MDV CL PLAC WEEK
$DATA "Simulated_Sutent_BP.csv" IGNORE=@
$SUBS ADVAN13 TOL=9

$MODEL
COMP (COMP1) 	;A1


$PK
RUV_PROP = THETA(1)
RUV_ADD = THETA(2)
POP_BASE_TREAT = THETA(3)
POP_MRT = THETA(4)
POP_SLOPE = THETA(5)
POP_BASE_PLAC = THETA(6)

ETA_BASE = ETA(1)
ETA_SLOPE = ETA(2)
ETA_MRT = ETA(3)


POP_BASE_GROUP = POP_BASE_TREAT
IF (PLAC.EQ.1) THEN
	POP_BASE_GROUP = POP_BASE_PLAC
ENDIF


BASE = (POP_BASE_GROUP*EXP(ETA_BASE))

MRT = (POP_MRT*EXP(ETA_MRT))

SLOPE = (POP_SLOPE*EXP(ETA_SLOPE))

A_0(1) = BASE

$DES
A1_DES = A(1)
AUC_DES = (DOS/CL)
KOUT_DES = (1/MRT)
KIN_DES = (BASE*KOUT_DES)
EFF_DES = (SLOPE*AUC_DES)
DADT(1) = ((KIN_DES*(1+EFF_DES))-(KOUT_DES*A1_DES))

$ERROR
EPS_RES = EPS(1)

A1 = A(1)
AUC = (DOS/CL)
KOUT = (1/MRT)
KIN = (BASE*KOUT)
EFF = (SLOPE*AUC)
IPRED = A1
W = SQRT((RUV_ADD*RUV_ADD)+ (RUV_PROP*RUV_PROP*IPRED*IPRED))
Y = IPRED+W*EPS_RES
IRES = DV - IPRED
IWRES = IRES/W

$THETA
( 0.0 , 0.0697 )	;RUV_PROP
( 0.0 , 6.24 )	;RUV_ADD
( 0.0 , 71.8 )	;POP_BASE_TREAT
( 0.0 , 361.0 )	;POP_MRT
( 0.0 , 0.119 )	;POP_SLOPE
( 0.0 , 77.6 )	;POP_BASE_PLAC

$OMEGA BLOCK(2)
(0.0151 )	;PPV_BASE
(-0.0515 )	;COV_BASE_SLOPE
(0.416 )	;PPV_SLOPE

$OMEGA
(0.694 )	;PPV_MRT

$SIGMA
1.0 FIX	;SIGMA_RES


$EST METHOD=COND NSIG=3 SIGL=9 MAXEVALS=9999 PRINT=10 NOABORT

$TABLE  ID TIME DOS MDV CL PLAC WEEK PRED RES WRES DV IPRED IRES IWRES Y NOAPPEND NOPRINT FILE=sdtab

$TABLE  ID BASE MRT SLOPE ETA_BASE ETA_SLOPE ETA_MRT NOAPPEND NOPRINT FILE=patab

$TABLE  ID DOS CL PLAC WEEK NOAPPEND NOPRINT FILE=cotab
